# OpenSim document version 30000
IKTaskSet tasks_pose_matching:
  IKCoordinateTask [values shared by the 7 below unless stated]: apply=true value_type=default_value value=0 weight=1
  IKCoordinateTask pelvis_obliquity: weight=0.1
  IKCoordinateTask pelvis_tilt: weight=0.1
  IKCoordinateTask mtp_angle_r
  IKCoordinateTask mtp_angle_l
  IKCoordinateTask lumbar_extension
  IKCoordinateTask lumbar_bending
  IKCoordinateTask lumbar_rotation
